# OpenSim document version 40000
InverseKinematicsTool default:
  constraint_weight: Inf
  accuracy: 1e-5
  time_range: -Inf Inf
  report_errors: true
  report_marker_locations: false
  IKTaskSet:
    IKMarkerTask STRN: apply=true weight=1
    IKMarkerTask RSHO: apply=true weight=2
    IKMarkerTask LSHO: apply=true weight=2
    IKMarkerTask C7: apply=true weight=2
    IKMarkerTask T8: apply=true weight=1
    IKMarkerTask XYPH: apply=true weight=1
    IKMarkerTask RUA1: apply=true weight=1
    IKMarkerTask RUA2: apply=true weight=1
    IKMarkerTask RUA3: apply=true weight=1
    IKMarkerTask RFAL: apply=true weight=1
    IKMarkerTask RFAM: apply=true weight=1
    IKMarkerTask RWRU: apply=true weight=3
    IKMarkerTask RWRR: apply=true weight=3
    IKMarkerTask RFIN: apply=false weight=.1
    IKMarkerTask LUA1: apply=true weight=1
    IKMarkerTask LUA2: apply=true weight=1
    IKMarkerTask LUA3: apply=true weight=1
    IKMarkerTask LFAM: apply=true weight=1
    IKMarkerTask LFAL: apply=true weight=1
    IKMarkerTask LWRU: apply=true weight=3
    IKMarkerTask LWRR: apply=true weight=3
    IKMarkerTask LFIN: apply=false weight=.1
    IKMarkerTask RASI: apply=true weight=4
    IKMarkerTask LASI: apply=true weight=4
    IKMarkerTask RPSI: apply=true weight=4
    IKMarkerTask RTH4: apply=true weight=1
    IKMarkerTask RTH2: apply=true weight=1
    IKMarkerTask RTH3: apply=true weight=1
    IKMarkerTask RSK4: apply=true weight=1
    IKMarkerTask RSK3: apply=true weight=1
    IKMarkerTask RSK2: apply=true weight=1
    IKMarkerTask RLHL: apply=true weight=1
    IKMarkerTask RHEE: apply=true weight=2
    IKMarkerTask RTOE: apply=true weight=1
    IKMarkerTask R5MT: apply=true weight=1
    IKMarkerTask LTH4: apply=true weight=1
    IKMarkerTask LTH2: apply=true weight=1
    IKMarkerTask LTH3: apply=true weight=1
    IKMarkerTask LSK4: apply=true weight=1
    IKMarkerTask LSK2: apply=true weight=1
    IKMarkerTask LSK3: apply=true weight=1
    IKMarkerTask LHEE: apply=true weight=2
    IKMarkerTask LTOE: apply=true weight=1
    IKMarkerTask L5MT: apply=true weight=1
    IKMarkerTask LPSI: apply=true weight=4
    IKMarkerTask LASI_2: apply=true weight=2
    IKMarkerTask RASI_2: apply=true weight=2
    IKMarkerTask LLHL: apply=true weight=1
    IKMarkerTask LSK1: apply=true weight=1
    IKMarkerTask RSK1: apply=true weight=1
    IKMarkerTask RTH1: apply=true weight=1
    IKMarkerTask LTH1: apply=true weight=1
